<?xml version="1.0" encoding="ISO-8859-1"?>
<neuroml xmlns="http://www.neuroml.org/schema/neuroml2" xmlns:xsi="http://www.w3.org/2001/XMLSchema-instance" xsi:schemaLocation="http://www.neuroml.org/schema/neuroml2 https://raw.github.com/NeuroML/NeuroML2/development/Schemas/NeuroML2/NeuroML_v2beta4.xsd" id="Golgi_CALC2">

    <notes>Internal calcium concentration due to calcium currents and pump from Solinas et al 2007. Based on CML/NeuroML file by P. Gleeson https://github.com/OpenSourceBrain/SolinasEtAl-GolgiCell </notes>

    <decayingPoolConcentrationModel id="Golgi_CALC2" restingConc="5e-5mM"  decayConstant="0.769231ms" ion="ca2" shellThickness="2.0378e-7m"/>

</neuroml>
