<neuroml xmlns="http://www.neuroml.org/schema/neuroml2"  xmlns:xs="http://www.w3.org/2001/XMLSchema" xmlns:xsi="http://www.w3.org/2001/XMLSchema-instance" xsi:schemaLocation="http://www.neuroml.org/schema/neuroml2 https://raw.github.com/NeuroML/NeuroML2/development/Schemas/NeuroML2/NeuroML_v2beta5.xsd" id="gocNetwork">
    <include href="GoC.cell.nml"/>
    <gapJunction id="GJ_0" conductance="426pS"/>
    <pulseGenerator id="stim_0" delay="500 ms" duration="400 ms" amplitude="0.0 pA"/>
    <pulseGenerator id="stim_1" delay="1400 ms" duration="400 ms" amplitude="10.0 pA"/>
    <pulseGenerator id="stim_2" delay="2300 ms" duration="400 ms" amplitude="20.0 pA"/>
    <pulseGenerator id="stim_3" delay="3200 ms" duration="400 ms" amplitude="30.0 pA"/>
    <pulseGenerator id="stim_4" delay="4100 ms" duration="400 ms" amplitude="40.0 pA"/>
    <pulseGenerator id="stim_5" delay="5000 ms" duration="400 ms" amplitude="50.0 pA"/>
    <pulseGenerator id="stim_6" delay="5900 ms" duration="400 ms" amplitude="60.0 pA"/>
    <pulseGenerator id="stim_7" delay="6800 ms" duration="400 ms" amplitude="70.0 pA"/>
    <pulseGenerator id="stim_8" delay="7700 ms" duration="400 ms" amplitude="80.0 pA"/>
    <pulseGenerator id="stim_9" delay="8600 ms" duration="400 ms" amplitude="90.0 pA"/>
    <pulseGenerator id="stim_10" delay="9500 ms" duration="400 ms" amplitude="100.0 pA"/>
    <pulseGenerator id="stim_11" delay="10400 ms" duration="400 ms" amplitude="110.0 pA"/>
    <pulseGenerator id="stim_12" delay="11300 ms" duration="400 ms" amplitude="120.0 pA"/>
    <pulseGenerator id="stim_13" delay="12200 ms" duration="400 ms" amplitude="130.0 pA"/>
    <pulseGenerator id="stim_14" delay="13100 ms" duration="400 ms" amplitude="140.0 pA"/>
    <pulseGenerator id="stim_15" delay="14000 ms" duration="400 ms" amplitude="150.0 pA"/>
    <pulseGenerator id="stim_16" delay="14900 ms" duration="400 ms" amplitude="160.0 pA"/>
    <pulseGenerator id="stim_17" delay="15800 ms" duration="400 ms" amplitude="170.0 pA"/>
    <pulseGenerator id="stim_18" delay="16700 ms" duration="400 ms" amplitude="180.0 pA"/>
    <pulseGenerator id="stim_19" delay="17600 ms" duration="400 ms" amplitude="190.0 pA"/>
    <pulseGenerator id="stim_20" delay="18500 ms" duration="400 ms" amplitude="200.0 pA"/>
    <network id="gocNetwork" type="networkWithTemperature" temperature="23 degC">
        <population id="GoClPop" component="GoCl" size="45" type="populationList">
            <instance id="0">
                <location x="107.181262842081907" y="92.77224796262702" z="15.684805052092115"/>
            </instance>
            <instance id="1">
                <location x="150.682516798466679" y="8.089743197219329" z="15.662553206718908"/>
            </instance>
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        </population>
        <electricalProjection id="gocGJ" presynapticPopulation="GoClPop" postsynapticPopulation="GoClPop">
            <electricalConnectionInstanceW id="0" preCell="../GoClPop/0/GoCl" preSegment="5" postCell="../GoClPop/1/GoCl" postSegment="1" synapse="GJ_0" weight="2."/>
            <electricalConnectionInstanceW id="1" preCell="../GoClPop/0/GoCl" preSegment="2" postCell="../GoClPop/2/GoCl" postSegment="2" synapse="GJ_0" weight="6."/>
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        </electricalProjection>
        <inputList id="ilist_0" population="GoClPop" component="stim_0">
            <input id="0" target="../GoClPop[36]" destination="synapses"/>
        </inputList>
        <inputList id="ilist_1" population="GoClPop" component="stim_1">
            <input id="0" target="../GoClPop[36]" destination="synapses"/>
        </inputList>
        <inputList id="ilist_2" population="GoClPop" component="stim_2">
            <input id="0" target="../GoClPop[36]" destination="synapses"/>
        </inputList>
        <inputList id="ilist_3" population="GoClPop" component="stim_3">
            <input id="0" target="../GoClPop[36]" destination="synapses"/>
        </inputList>
        <inputList id="ilist_4" population="GoClPop" component="stim_4">
            <input id="0" target="../GoClPop[36]" destination="synapses"/>
        </inputList>
        <inputList id="ilist_5" population="GoClPop" component="stim_5">
            <input id="0" target="../GoClPop[36]" destination="synapses"/>
        </inputList>
        <inputList id="ilist_6" population="GoClPop" component="stim_6">
            <input id="0" target="../GoClPop[36]" destination="synapses"/>
        </inputList>
        <inputList id="ilist_7" population="GoClPop" component="stim_7">
            <input id="0" target="../GoClPop[36]" destination="synapses"/>
        </inputList>
        <inputList id="ilist_8" population="GoClPop" component="stim_8">
            <input id="0" target="../GoClPop[36]" destination="synapses"/>
        </inputList>
        <inputList id="ilist_9" population="GoClPop" component="stim_9">
            <input id="0" target="../GoClPop[36]" destination="synapses"/>
        </inputList>
        <inputList id="ilist_10" population="GoClPop" component="stim_10">
            <input id="0" target="../GoClPop[36]" destination="synapses"/>
        </inputList>
        <inputList id="ilist_11" population="GoClPop" component="stim_11">
            <input id="0" target="../GoClPop[36]" destination="synapses"/>
        </inputList>
        <inputList id="ilist_12" population="GoClPop" component="stim_12">
            <input id="0" target="../GoClPop[36]" destination="synapses"/>
        </inputList>
        <inputList id="ilist_13" population="GoClPop" component="stim_13">
            <input id="0" target="../GoClPop[36]" destination="synapses"/>
        </inputList>
        <inputList id="ilist_14" population="GoClPop" component="stim_14">
            <input id="0" target="../GoClPop[36]" destination="synapses"/>
        </inputList>
        <inputList id="ilist_15" population="GoClPop" component="stim_15">
            <input id="0" target="../GoClPop[36]" destination="synapses"/>
        </inputList>
        <inputList id="ilist_16" population="GoClPop" component="stim_16">
            <input id="0" target="../GoClPop[36]" destination="synapses"/>
        </inputList>
        <inputList id="ilist_17" population="GoClPop" component="stim_17">
            <input id="0" target="../GoClPop[36]" destination="synapses"/>
        </inputList>
        <inputList id="ilist_18" population="GoClPop" component="stim_18">
            <input id="0" target="../GoClPop[36]" destination="synapses"/>
        </inputList>
        <inputList id="ilist_19" population="GoClPop" component="stim_19">
            <input id="0" target="../GoClPop[36]" destination="synapses"/>
        </inputList>
        <inputList id="ilist_20" population="GoClPop" component="stim_20">
            <input id="0" target="../GoClPop[36]" destination="synapses"/>
        </inputList>
    </network>
</neuroml>
