<?xml version="1.0" ?>
<Lems xmlns="http://www.neuroml.org/lems/0.7.3" xmlns:xsi="http://www.w3.org/2001/XMLSchema-instance" xsi:schemaLocation="http://www.neuroml.org/lems/0.7.3 https://raw.githubusercontent.com/LEMS/LEMS/development/Schemas/LEMS/LEMS_v0.7.3.xsd">
  <Component id="MF_Input" period="2000 ms" type="spikeGenerator"/>
  <Component averageRate="5 Hz" id="MF_Poisson" type="spikeGeneratorPoisson"/>
  <Component averageRate="100 Hz" delay="2000 ms" duration="500 ms" id="MF_Burst" spikeTarget="./MFGoC_SynMult" synapse="MFGoC_SynMult" type="transientPoissonFiringSynapse"/>
</Lems>
